x := [1, 2, 3, 3, 3, 4, 5, 6, 6, 7, 7, 9, 8, 8]
y := sort(transpose(x))
transpose(y) = [1, 2, 3, 3, 3, 4, 5, 6, 6, 7, 7, 8, 8, 9]
n := length(y) = 14
a0 := 0
a1 := 10
f(x) := 1/π*atan(a0 + a1*x) + 1/2
df(x) := d/dx(f(x))
